*Heading
** Job name: tiltboom-120623 Model name: Model-1
** Generated by: Abaqus/CAE 2020
*Preprint, echo=NO, model=NO, history=NO, contact=NO
**
** PARTS
**
*Part, name=P000516_A_1-Taittopuomi_fem
*Node
      1, -0.437999994,        0.287, 0.0510110967
      2, -0.437999994,        0.287, 0.0450110957
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*Element, type=C3D10
  1,   25,   23,  237,    3,  921,  920,  919,  923,  922,  924
  2,  841,    3,  237,  238,  926,  924,  925,  928,  927,  929
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*Nset, nset=InitiallyInvalid
 136, 137, 139, 141, 144
*Nset, nset=Set-2
   69,   70,   71,   72,   73,   74
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*Elset, elset=Set-2
 1084, 1085, 1086, 1087, 1088, 1089
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*Nset, nset=Set-12, generate
    1,  5409,     1
*Elset, elset=Set-12, generate
    1,  2732,     1
** Section: Section-1
*Solid Section, elset=Set-12, material=Material-1
,
*End Part
**
**
** ASSEMBLY
**
*Assembly, name=Assembly
**
*Instance, name=P000516_A_1-Taittopuomi_fem-1, part=P000516_A_1-Taittopuomi_fem
*End Instance
**
*End Assembly
**
** MATERIALS
**
*Material, name=Material-1
*Density
7850.,
*Elastic
 2.1e+11, 0.3
** ----------------------------------------------------------------
**
**
** STEP: Matrix gen
*Step, name=matrix-step
*Matrix generate, stiffness, mass
*Matrix output, stiffness, mass, format=coordinate
*End Step
